<?xml version="1.0"?>
<?xml-stylesheet type="text/xsl" href="http://jsbsim.sourceforge.net/JSBSim.xsl"?>

<fdm_config name="Lancaster" version="2.0" release="ALPHA"
   xmlns:xsi="http://www.w3.org/2001/XMLSchema-instance"
>

	<fileheader>
		<author> Aeromatic v 0.95 </author>
		<filecreationdate>2014-12-01</filecreationdate>
		<version>$Revision: 1.15 $</version>
		<description>Avro Lancaster Mk.1</description>
	</fileheader>

	<!--
	File:     Lancaster_jsb.xml
	Inputs:
		name:          Lancaster
		type:          multi-engine prop bomber
		max weight:    72000 lb
		wing span:     102 ft
		length:        69.33 ft
		wing area:     1297 sq-ft
		gear type:     taildragger
		retractable?:  yes
		# engines:     4
		engine type:   piston
		engine layout: wings
		yaw damper?    no

	Outputs:
		wing loading:  55.51 lb/sq-ft
		payload:       17255.0 lbs
		CL-alpha:      4.9 per radian
		CL-0:          0.24
		CL-max:        1.4
		CD-0:          0.025
		K:             0.039

	-->

	<metrics>
		<wingarea  unit="FT2"> 1297.00 </wingarea>
		<wingspan  unit="FT" >  102.00 </wingspan>
		<wing_incidence>          2.00 </wing_incidence>
		<chord     unit="FT" >   12.72 </chord>
		<htailarea unit="FT2">  207.52 </htailarea>
		<htailarm  unit="FT" >   34.66 </htailarm>
		<vtailarea unit="FT2">  233.46 </vtailarea>
		<vtailarm  unit="FT" >   34.66 </vtailarm>
		<location name="AERORP" unit="IN">
			<x> 415.98 </x>
			<y>   0.00 </y>
			<z>   0.00 </z>
		</location>
		<location name="EYEPOINT" unit="IN">
			<x> 66.56 </x>
			<y> -24.00 </y>
			<z> 0.00 </z>
		</location>
		<location name="VRP" unit="IN">
			<x>0</x>
			<y>0</y>
			<z>0</z> <!-- -60 -->
		</location>
	</metrics>

	<mass_balance>
		<ixx unit="SLUG*FT2">    301554 </ixx>
		<iyy unit="SLUG*FT2">    166665 </iyy>
		<izz unit="SLUG*FT2">    458847 </izz>
		<emptywt unit="LBS" >     36457 </emptywt>
		<location name="CG" unit="IN">
			<x>415.98 </x>
			<y>   0.00 </y>
			<z> 0.80 </z>
		</location>

		<pointmass name="Crew">
			<weight unit="LBS">1400</weight>
			<location name="POINTMASS" unit="IN">
				<x>0.00</x>
				<y>0.00</y>
				<z>-7.876</z>
			</location>
		</pointmass>

		<pointmass name="Bombload">
			<weight unit="LBS">22000</weight>
			<location name="POINTMASS" unit="IN">
				<x>415.98.102</x>
				<y>0.00</y>
				<z>0.00</z>
			</location>
		</pointmass>
	</mass_balance>

	<ground_reactions>

		<contact type="BOGEY" name="LEFT_MAIN">
			<location unit="IN">
				<x> 278.54 </x>
				<y> -234.64 </y>
				<z> -64.00 </z>
			</location>
			<static_friction>  0.80 </static_friction>
			<dynamic_friction> 0.50 </dynamic_friction>
			<rolling_friction> 0.02 </rolling_friction>
			<spring_coeff unit="LBS/FT">      30000.00 </spring_coeff>
			<damping_coeff unit="LBS/FT/SEC"> 25000.00 </damping_coeff>
			<max_steer unit="DEG">0</max_steer>
			<brake_group>LEFT</brake_group>
			<retractable>1</retractable>
		</contact>

		<contact type="BOGEY" name="RIGHT_MAIN">
			<location unit="IN">
				<x> 278.54 </x>
				<y> 234.64 </y>
				<z> -64.00 </z>
			</location>
			<static_friction>  0.80 </static_friction>
			<dynamic_friction> 0.50 </dynamic_friction>
			<rolling_friction> 0.02 </rolling_friction>
			<spring_coeff unit="LBS/FT">      30000.00 </spring_coeff>
			<damping_coeff unit="LBS/FT/SEC"> 25000.00 </damping_coeff>
			<max_steer unit="DEG">0</max_steer>
			<brake_group>RIGHT</brake_group>
			<retractable>1</retractable>
		</contact>

		<contact type="BOGEY" name="TAIL">
			<location unit="IN">
				<x> 757.08 </x>
				<y>   0.00 </y>
				<z> -12 </z>
			</location>
			<static_friction>  0.80 </static_friction>
			<dynamic_friction> 0.50 </dynamic_friction>
			<rolling_friction> 0.02 </rolling_friction>
			<spring_coeff unit="LBS/FT"> 16200 </spring_coeff>
			<damping_coeff unit="LBS/FT/SEC"> 4000 </damping_coeff>
			<damping_coeff_rebound unit="LBS/FT/SEC">2500</damping_coeff_rebound>
			<steerability> STEERABLE </steerability>
			<max_steer unit="DEG"> -60.00 </max_steer>
			<brake_group>NONE</brake_group>
			<retractable>0</retractable>
		</contact>

		<!-- contact type="STRUCTURE" name="LEFT_MAIN_S">
			<location unit="IN">
				<x> 278.54 </x>
				<y> -234.64 </y>
				<z> -86.39 </z>
			</location>
			<static_friction>  0.80 </static_friction>
			<dynamic_friction> 0.50 </dynamic_friction>
			<rolling_friction> 0.02 </rolling_friction>
			<spring_coeff unit="LBS/FT">      30000.00 </spring_coeff>
			<damping_coeff unit="LBS/FT/SEC"> 25000.00 </damping_coeff>
		</contact -->

		<!-- contact type="STRUCUTURE" name="RIGHT_MAIN_S">
			<location unit="IN">
				<x> 278.54 </x>
				<y> 234.64 </y>
				<z> -86.39 </z>
			</location>
			<static_friction>  0.80 </static_friction>
			<dynamic_friction> 0.50 </dynamic_friction>
			<rolling_friction> 0.02 </rolling_friction>
			<spring_coeff unit="LBS/FT">      30000.00 </spring_coeff>
			<damping_coeff unit="LBS/FT/SEC"> 25000.00 </damping_coeff>
		</contact -->

		<contact type="STRUCTURE" name="NOSE">
			<location unit="IN">
				<x> -20.0 </x>
				<y> 0.00 </y>
				<z> -60.80 </z>
			</location>
			<static_friction>  1.00 </static_friction>
			<dynamic_friction> 1.00 </dynamic_friction>
			<spring_coeff unit="LBS/FT">      7200.00 </spring_coeff>
			<damping_coeff unit="LBS/FT/SEC"> 350.00 </damping_coeff>
		</contact>

		<contact type="STRUCTURE" name="LEFT_WING">
			<location unit="IN">
				<x> 415.98 </x>
				<y> -612.00 </y>
				<z> -20.80 </z>
			</location>
			<static_friction>  1.00 </static_friction>
			<dynamic_friction> 1.00 </dynamic_friction>
			<spring_coeff unit="LBS/FT">      72000.00 </spring_coeff>
			<damping_coeff unit="LBS/FT/SEC"> 72000.00 </damping_coeff>
		</contact>

		<contact type="STRUCTURE" name="RIGHT_WING">
			<location unit="IN">
				<x> 415.98 </x>
				<y>  612.00 </y>
				<z> -20.80 </z>
			</location>
			<static_friction>  1.00 </static_friction>
			<dynamic_friction> 1.00 </dynamic_friction>
			<spring_coeff unit="LBS/FT">      72000.00 </spring_coeff>
			<damping_coeff unit="LBS/FT/SEC"> 72000.00 </damping_coeff>
		</contact>

	</ground_reactions>

<propulsion>

	<engine file="RRMerlin">
		<location unit="IN">
			<x> 415.98 </x>
			<y> -204.00 </y>
			<z> -40.00 </z>
		</location>
		<orient unit="DEG">
			<pitch> 0.00 </pitch>
			<roll>  0.00 </roll>
			<yaw>   0.00 </yaw>
		</orient>
		<feed>6</feed>
		<thruster file="Prop">
			<sense> 1 </sense>
			<location unit="IN">
				<x> 415.98 </x>
				<y> -204.00 </y>
				<z> -40.00 </z>
			</location>
			<orient unit="DEG">
				<pitch> 0.00 </pitch>
				<roll>  0.00 </roll>
				<yaw>   0.00 </yaw>
			</orient>
		</thruster>
	</engine>

	<engine file="RRMerlin">
		<location unit="IN">
			<x> 415.98 </x>
			<y> -204.00 </y>
			<z> -40.00 </z>
		</location>
		<orient unit="DEG">
			<pitch> 0.00 </pitch>
			<roll>  0.00 </roll>
			<yaw>   0.00 </yaw>
		</orient>
		<feed>7</feed>
		<thruster file="Prop">
			<sense> 1 </sense>
			<location unit="IN">
				<x> 415.98 </x>
				<y> -204.00 </y>
				<z> -40.00 </z>
			</location>
			<orient unit="DEG">
				<pitch> 0.00 </pitch>
				<roll>  0.00 </roll>
				<yaw>   0.00 </yaw>
			</orient>
		</thruster>
	</engine>

	<engine file="RRMerlin">
		<location unit="IN">
			<x> 415.98 </x>
			<y> 204.00 </y>
			<z> -40.00 </z>
		</location>
		<orient unit="DEG">
			<pitch> 0.00 </pitch>
			<roll>  0.00 </roll>
			<yaw>   0.00 </yaw>
		</orient>
		<feed>8</feed>
		<thruster file="Prop">
			<sense> 1 </sense>
			<location unit="IN">
				<x> 415.98 </x>
				<y> 204.00 </y>
				<z> -40.00 </z>
			</location>
			<orient unit="DEG">
				<pitch> 0.00 </pitch>
				<roll>  0.00 </roll>
				<yaw>   0.00 </yaw>
			</orient>
		</thruster>
	</engine>

	<engine file="RRMerlin">
		<location unit="IN">
			<x> 415.98 </x>
			<y> 204.00 </y>
			<z> -40.00 </z>
		</location>
		<orient unit="DEG">
			<pitch> 0.00 </pitch>
			<roll>  0.00 </roll>
			<yaw>   0.00 </yaw>
		</orient>
		<feed>9</feed>
		<thruster file="Prop">
			<sense> 1 </sense>
			<location unit="IN">
				<x> 415.98 </x>
				<y> 204.00 </y>
				<z> -40.00 </z>
			</location>
			<orient unit="DEG">
				<pitch> 0.00 </pitch>
				<roll>  0.00 </roll>
				<yaw>   0.00 </yaw>
			</orient>
		</thruster>
	</engine>

	<tank type="FUEL" number="0">
		<location unit="IN">
			<x> 415.98 </x>
			<y>   0.00 </y>
			<z> -20.80 </z>
		</location>
		<capacity unit="LBS"> 4218.00 </capacity>
		<contents unit="LBS"> 4218.00 </contents>
	</tank>

	<tank type="FUEL" number="1">
		<location unit="IN">
			<x> 415.98 </x>
			<y>   0.00 </y>
			<z> -20.80 </z>
		</location>
		<capacity unit="LBS"> 4218.00 </capacity>
		<contents unit="LBS"> 4218.00 </contents>
	</tank>

	<tank type="FUEL" number="2">
		<location unit="IN">
			<x> 415.98 </x>
			<y>   0.00 </y>
			<z> -20.80 </z>
		</location>
		<capacity unit="LBS"> 2784.00 </capacity>
		<contents unit="LBS"> 2784.00 </contents>
	</tank>

	<tank type="FUEL" number="3">
		<location unit="IN">
			<x> 415.98 </x>
			<y>   0.00 </y>
			<z> -20.80 </z>
		</location>
		<capacity unit="LBS"> 2784.00 </capacity>
		<contents unit="LBS"> 2784.00 </contents>
	</tank>
	<tank type="FUEL" number="4">
		<location unit="IN">
			<x> 415.98 </x>
			<y>   0.00 </y>
			<z> -20.80 </z>
		</location>
		<capacity unit="LBS"> 828.00 </capacity>
		<contents unit="LBS"> 828.00 </contents>
	</tank>

	<tank type="FUEL" number="5">
		<location unit="IN">
			<x> 415.98 </x>
			<y>   0.00 </y>
			<z> -20.80 </z>
		</location>
		<capacity unit="LBS"> 828.00 </capacity>
		<contents unit="LBS"> 828.00 </contents>
	</tank>

	<tank type="FUEL" number="6">
		<location unit="IN">
			<x> 415.98 </x>
			<y>   0.00 </y>
			<z> -20.80 </z>
		</location>
		<capacity unit="LBS"> 25.00 </capacity>
		<contents unit="LBS"> 25.00 </contents>
	</tank>

	<tank type="FUEL" number="7">
		<location unit="IN">
			<x> 415.98 </x>
			<y>   0.00 </y>
			<z> -20.80 </z>
		</location>
		<capacity unit="LBS"> 25.00 </capacity>
		<contents unit="LBS"> 25.00 </contents>
	</tank>

	<tank type="FUEL" number="8">
		<location unit="IN">
			<x> 415.98 </x>
			<y>   0.00 </y>
			<z> -20.80 </z>
		</location>
		<capacity unit="LBS"> 25.00 </capacity>
		<contents unit="LBS"> 25.00 </contents>
	</tank>

	<tank type="FUEL" number="9">
		<location unit="IN">
			<x> 415.98 </x>
			<y>   0.00 </y>
			<z> -20.80 </z>
		</location>
		<capacity unit="LBS"> 25.00 </capacity>
		<contents unit="LBS"> 25.00 </contents>
	</tank>

</propulsion>

<system file="Taildragger_PushbackJSBSIM"/>

<flight_control name="FCS: Lancaster">

  <channel name="Pitch">

   <summer name="Pitch Trim Sum">
      <input>fcs/elevator-cmd-norm</input>
      <input>fcs/pitch-trim-cmd-norm</input>
      <clipto>
        <min> -1 </min>
        <max>  1 </max>
      </clipto>
   </summer>

   <aerosurface_scale name="Elevator Control">
      <input>fcs/pitch-trim-sum</input>
      <range>
        <min> -0.35 </min>
        <max>  0.35 </max>
      </range>
      <output>fcs/elevator-pos-rad</output>
   </aerosurface_scale>

   <aerosurface_scale name="elevator normalization">
      <input>fcs/elevator-pos-rad</input>
      <domain>
        <min> -0.35 </min>
        <max>  0.35 </max>
      </domain>
      <range>
        <min> -1 </min>
        <max>  1 </max>
      </range>
      <output>fcs/elevator-pos-norm</output>
   </aerosurface_scale>

  </channel>

  <channel name="Roll">

   <summer name="Roll Trim Sum">
      <input>fcs/aileron-cmd-norm</input>
      <input>fcs/roll-trim-cmd-norm</input>
      <clipto>
        <min> -1 </min>
        <max>  1 </max>
      </clipto>
   </summer>

   <aerosurface_scale name="Left Aileron Control">
      <input>fcs/roll-trim-sum</input>
      <range>
        <min> -0.35 </min>
        <max>  0.35 </max>
      </range>
      <output>fcs/left-aileron-pos-rad</output>
   </aerosurface_scale>

   <aerosurface_scale name="Right Aileron Control">
      <input>fcs/roll-trim-sum</input>
      <range>
        <min> -0.35 </min>
        <max>  0.35 </max>
      </range>
      <output>fcs/right-aileron-pos-rad</output>
   </aerosurface_scale>

   <aerosurface_scale name="left aileron normalization">
      <input>fcs/left-aileron-pos-rad</input>
      <domain>
        <min> -0.35 </min>
        <max>  0.35 </max>
      </domain>
      <range>
        <min> -1 </min>
        <max>  1 </max>
      </range>
      <output>fcs/left-aileron-pos-norm</output>
   </aerosurface_scale>

   <aerosurface_scale name="right aileron normalization">
      <input>fcs/right-aileron-pos-rad</input>
      <domain>
        <min> -0.35 </min>
        <max>  0.35 </max>
      </domain>
      <range>
        <min> -1 </min>
        <max>  1 </max>
      </range>
      <output>fcs/right-aileron-pos-norm</output>
   </aerosurface_scale>

  </channel>

  <channel name="Yaw">

   <summer name="Rudder Command Sum">
      <input>fcs/rudder-cmd-norm</input>
      <input>fcs/yaw-trim-cmd-norm</input>
      <clipto>
        <min> -1 </min>
        <max>  1 </max>
      </clipto>
   </summer>

   <aerosurface_scale name="Rudder Control">
      <input>fcs/rudder-command-sum</input>
      <range>
        <min> -0.35 </min>
        <max>  0.35 </max>
      </range>
      <output>fcs/rudder-pos-rad</output>
   </aerosurface_scale>

   <aerosurface_scale name="rudder normalization">
      <input>fcs/rudder-pos-rad</input>
      <domain>
        <min> -0.35 </min>
        <max>  0.35 </max>
      </domain>
      <range>
        <min> -1 </min>
        <max>  1 </max>
      </range>
      <output>fcs/rudder-pos-norm</output>
   </aerosurface_scale>

  </channel>

  <channel name="Flaps">
   <kinematic name="Flaps Control">
     <input>fcs/flap-cmd-norm</input>
     <traverse>
       <setting>
          <position>  0 </position>
          <time>      0 </time>
       </setting>
       <setting>
          <position> 15 </position>
          <time>      4 </time>
       </setting>
       <setting>
          <position> 30 </position>
          <time>      3 </time>
       </setting>
     </traverse>
     <output>fcs/flap-pos-deg</output>
   </kinematic>

   <aerosurface_scale name="flap normalization">
      <input>fcs/flap-pos-deg</input>
      <domain>
        <min>  0 </min>
        <max> 30 </max>
      </domain>
      <range>
        <min> 0 </min>
        <max> 1 </max>
      </range>
      <output>fcs/flap-pos-norm</output>
   </aerosurface_scale>

  </channel>

  <channel name="Landing Gear">
   <kinematic name="Gear Control">
     <input>gear/gear-cmd-norm</input>
     <traverse>
       <setting>
          <position> 0 </position>
          <time>     0 </time>
       </setting>
       <setting>
          <position> 1 </position>
          <time>     5 </time>
       </setting>
     </traverse>
     <output>gear/gear-pos-norm</output>
   </kinematic>

  </channel>

  <channel name="Speedbrake">
   <kinematic name="Speedbrake Control">
     <input>fcs/speedbrake-cmd-norm</input>
     <traverse>
       <setting>
          <position> 0 </position>
          <time>     0 </time>
       </setting>
       <setting>
          <position> 1 </position>
          <time>     1 </time>
       </setting>
     </traverse>
     <output>fcs/speedbrake-pos-norm</output>
   </kinematic>

  </channel>

      <!-- channel name="tail wheel">

        <switch name="systems/gear/tail-wheel-stick-forward">
          <default value="1"/>
          <test value="0">
            fcs/elevator-cmd-norm GE 0.45
          </test>
         <output>fcs/tail-wheel-lock-cmd-norm</output>
       </switch>

      <switch name="fcs/tail-wheel-free">
        <default value="1.0"/>
        <test value="0.0">
           fcs/tail-wheel-lock-cmd-norm GT 0.05
        </test>
        <output>gear/unit[2]/castered</output>
      </switch>

     <fcs_function name="fcs/tail-wheel-locked-deg">
       <function>
         <product>
            <property> fcs/rudder-pos-norm </property>
            <value> 6.0 </value>
          </product>
      </function>
      <output>fcs/steer-pos-deg[2]</output>
    </fcs_function>

    </channel -->

 </flight_control>

 <aerodynamics>

  <axis name="LIFT">

    <function name="aero/force/Lift_alpha">
      <description>Lift due to alpha</description>
      <product>
          <property>aero/qbar-psf</property>
          <property>metrics/Sw-sqft</property>
          <table>
            <independentVar lookup="row">aero/alpha-rad</independentVar>
            <tableData>
              -0.20 -0.740
               0.00  0.240
               0.24  1.400
               0.60  0.704
            </tableData>
          </table>
      </product>
    </function>

    <function name="aero/force/Lift_flap">
       <description>Delta Lift due to flaps</description>
       <product>
           <property>aero/qbar-psf</property>
           <property>metrics/Sw-sqft</property>
           <property>fcs/flap-pos-deg</property>
           <value> 0.02000 </value>
       </product>
    </function>

    <function name="aero/force/Lift_speedbrake">
       <description>Delta Lift due to speedbrake</description>
       <product>
           <property>aero/qbar-psf</property>
           <property>metrics/Sw-sqft</property>
           <property>fcs/speedbrake-pos-norm</property>
           <value>0</value>
       </product>
    </function>

    <function name="aero/force/Lift_elevator">
       <description>Lift due to Elevator Deflection</description>
       <product>
           <property>aero/qbar-psf</property>
           <property>metrics/Sw-sqft</property>
           <property>fcs/elevator-pos-rad</property>
           <value>0.2</value>
       </product>
    </function>

  </axis>

  <axis name="DRAG">

    <function name="aero/force/Drag_basic">
       <description>Drag at zero lift</description>
       <product>
          <property>aero/qbar-psf</property>
          <property>metrics/Sw-sqft</property>
          <table>
            <independentVar lookup="row">aero/alpha-rad</independentVar>
            <tableData>
             -1.57    1.500
             -0.26    0.033
              0.00    0.025
              0.26    0.033
              1.57    1.500
            </tableData>
          </table>
       </product>
    </function>

    <function name="aero/force/Drag_induced">
       <description>Induced drag</description>
         <product>
           <property>aero/qbar-psf</property>
           <property>metrics/Sw-sqft</property>
           <property>aero/cl-squared</property>
           <value>0.039</value>
         </product>
    </function>

    <function name="aero/force/Drag_mach">
       <description>Drag due to mach</description>
        <product>
          <property>aero/qbar-psf</property>
          <property>metrics/Sw-sqft</property>
          <table>
            <independentVar lookup="row">velocities/mach</independentVar>
            <tableData>
                0.00      0.000
                0.7      0.000
                1.10      0.023
                1.80      0.015
            </tableData>
          </table>
        </product>
    </function>

    <function name="aero/force/Drag_flap">
       <description>Drag due to flaps</description>
         <product>
           <property>aero/qbar-psf</property>
           <property>metrics/Sw-sqft</property>
           <property>fcs/flap-pos-deg</property>
           <value> 0.00117 </value>
         </product>
    </function>

    <function name="aero/force/Drag_gear">
       <description>Drag due to gear</description>
         <product>
           <property>aero/qbar-psf</property>
           <property>metrics/Sw-sqft</property>
           <property>gear/gear-pos-norm</property>
           <value>0.023</value>
         </product>
    </function>

    <function name="aero/force/Drag_speedbrake">
       <description>Drag due to speedbrakes</description>
         <product>
           <property>aero/qbar-psf</property>
           <property>metrics/Sw-sqft</property>
           <property>fcs/speedbrake-pos-norm</property>
           <value>0.025</value>
         </product>
    </function>

    <function name="aero/force/Drag_beta">
       <description>Drag due to sideslip</description>
       <product>
          <property>aero/qbar-psf</property>
          <property>metrics/Sw-sqft</property>
          <table>
            <independentVar lookup="row">aero/beta-rad</independentVar>
            <tableData>
              -1.57    1.230
              -0.26    0.050
               0.00    0.000
               0.26    0.050
               1.57    1.230
            </tableData>
          </table>
       </product>
    </function>

    <function name="aero/force/Drag_elevator">
       <description>Drag due to Elevator Deflection</description>
       <product>
           <property>aero/qbar-psf</property>
           <property>metrics/Sw-sqft</property>
           <abs><property>fcs/elevator-pos-norm</property></abs>
           <value>0.04</value>
       </product>
    </function>

  </axis>

  <axis name="SIDE">

    <function name="aero/force/Side_beta">
       <description>Side force due to beta</description>
       <product>
           <property>aero/qbar-psf</property>
           <property>metrics/Sw-sqft</property>
           <property>aero/beta-rad</property>
           <value>-1</value>
       </product>
    </function>

  </axis>

  <axis name="ROLL">

    <function name="aero/moment/Roll_beta">
       <description>Roll moment due to beta</description>
       <product>
           <property>aero/qbar-psf</property>
           <property>metrics/Sw-sqft</property>
           <property>metrics/bw-ft</property>
           <property>aero/beta-rad</property>
           <value>-0.1</value>
       </product>
    </function>

    <function name="aero/moment/Roll_damp">
       <description>Roll moment due to roll rate</description>
       <product>
           <property>aero/qbar-psf</property>
           <property>metrics/Sw-sqft</property>
           <property>metrics/bw-ft</property>
           <property>aero/bi2vel</property>
           <property>velocities/p-aero-rad_sec</property>
           <value>-0.4</value>
       </product>
    </function>

    <function name="aero/moment/Roll_yaw">
       <description>Roll moment due to yaw rate</description>
       <product>
           <property>aero/qbar-psf</property>
           <property>metrics/Sw-sqft</property>
           <property>metrics/bw-ft</property>
           <property>aero/bi2vel</property>
           <property>velocities/r-aero-rad_sec</property>
           <value>0.15</value>
       </product>
    </function>

    <function name="aero/moment/Roll_aileron">
       <description>Roll moment due to aileron</description>
       <product>
          <property>aero/qbar-psf</property>
          <property>metrics/Sw-sqft</property>
          <property>metrics/bw-ft</property>
          <property>fcs/left-aileron-pos-rad</property>
          <value>0.15</value>
       </product>
    </function>

    <function name="aero/moment/Roll_rudder">
       <description>Roll moment due to rudder</description>
       <product>
           <property>aero/qbar-psf</property>
           <property>metrics/Sw-sqft</property>
           <property>metrics/bw-ft</property>
           <property>fcs/rudder-pos-rad</property>
           <value>0.01</value>
       </product>
    </function>

  </axis>

  <axis name="PITCH">

    <function name="aero/moment/Pitch_alpha">
       <description>Pitch moment due to alpha</description>
       <product>
           <property>aero/qbar-psf</property>
           <property>metrics/Sw-sqft</property>
           <property>metrics/cbarw-ft</property>
           <property>aero/alpha-rad</property>
           <value>-0.4</value>
       </product>
    </function>

    <function name="aero/moment/Pitch_elevator">
       <description>Pitch moment due to elevator</description>
       <product>
          <property>aero/qbar-psf</property>
          <property>metrics/Sw-sqft</property>
          <property>metrics/cbarw-ft</property>
          <property>fcs/elevator-pos-rad</property>
          <table>
            <independentVar lookup="row">velocities/mach</independentVar>
            <tableData>
              0.0     -1.000
              2.0     -0.250
            </tableData>
          </table>
       </product>
    </function>

    <function name="aero/moment/Pitch_damp">
       <description>Pitch moment due to pitch rate</description>
       <product>
           <property>aero/qbar-psf</property>
           <property>metrics/Sw-sqft</property>
           <property>metrics/cbarw-ft</property>
           <property>aero/ci2vel</property>
           <property>velocities/q-aero-rad_sec</property>
           <value>-22</value>
       </product>
    </function>

    <function name="aero/moment/Pitch_alphadot">
       <description>Pitch moment due to alpha rate</description>
       <product>
           <property>aero/qbar-psf</property>
           <property>metrics/Sw-sqft</property>
           <property>metrics/cbarw-ft</property>
           <property>aero/ci2vel</property>
           <property>aero/alphadot-rad_sec</property>
           <value>-8</value>
       </product>
    </function>

  </axis>

  <axis name="YAW">

    <function name="aero/moment/Yaw_beta">
       <description>Yaw moment due to beta</description>
       <product>
           <property>aero/qbar-psf</property>
           <property>metrics/Sw-sqft</property>
           <property>metrics/bw-ft</property>
           <property>aero/beta-rad</property>
           <value>0.12</value>
       </product>
    </function>

    <function name="aero/moment/Yaw_damp">
       <description>Yaw moment due to yaw rate</description>
       <product>
           <property>aero/qbar-psf</property>
           <property>metrics/Sw-sqft</property>
           <property>metrics/bw-ft</property>
           <property>aero/bi2vel</property>
           <property>velocities/r-aero-rad_sec</property>
           <value>-0.15</value>
       </product>
    </function>

    <function name="aero/moment/Yaw_rudder">
       <description>Yaw moment due to rudder</description>
       <product>
           <property>aero/qbar-psf</property>
           <property>metrics/Sw-sqft</property>
           <property>metrics/bw-ft</property>
           <property>fcs/rudder-pos-rad</property>
           <value>-0.1</value>
       </product>
    </function>

    <function name="aero/moment/Yaw_aileron">
       <description>Adverse yaw</description>
       <product>
           <property>aero/qbar-psf</property>
           <property>metrics/Sw-sqft</property>
           <property>metrics/bw-ft</property>
           <property>fcs/left-aileron-pos-rad</property>
           <value>-0.008</value>
       </product>
    </function>

  </axis>

 </aerodynamics>

<!-- JPACK: Force-point for Voodoomaster Pushback -->
<!-- ATTN: Taildragger pulls instead of pushes -->
<external_reactions>
	<force name="pushback" frame="BODY">
		<location unit="IN">
			<x>-194</x>
			<y>-10</y>
			<z>-249</z>
		</location>
		<direction>
			<x>1</x>
			<y>0</y>
			<z>0</z>
		</direction>
	</force>
</external_reactions>

</fdm_config>
